aircraft
#AVL input file written by avlwrapper 0.3.0#Mach
0
#iYsym iZsym Zsym
0 0 0.0
#Sref Cref Bref
3.9800000000000004 0.7719430485762144  5.2
#Xref Yref Zref
0 0 0
0.0
SURFACE
wing
#NChordwise ChordSpacing NSpanwise SpanSpacing
12 1 20 1
YDUPLICATE
0.0
SECTION
#Xle Yle Zle Chord Angle
0 0 0 0.9 0.0
NACA
2414
SECTION
#Xle Yle Zle Chord Angle
0.0 3.6 0.0 0.7 0.0
NACA
2414
SECTION
#Xle Yle Zle Chord Angle
0.0 4.16 0.0 0.69125 0.0
NACA
2414
CONTROL
#Name Gain XHinge Vector SgnDup
aileron 1.0 0.6 0 0 0 -1
SECTION
#Xle Yle Zle Chord Angle
0.0 5.2 0.0 0.675 0.0
NACA
2414
CONTROL
#Name Gain XHinge Vector SgnDup
aileron 1.0 0.6 0 0 0 -1

SURFACE
horizontal
#NChordwise ChordSpacing NSpanwise SpanSpacing
12 1 20 1
YDUPLICATE
0.0
SECTION
#Xle Yle Zle Chord Angle
2 0 0 0.675 0.0
NACA
0012
SECTION
#Xle Yle Zle Chord Angle
2.0 0.7400000000000001 0.0 0.675 0.0
NACA
0012
CONTROL
#Name Gain XHinge Vector SgnDup
elevator 1.0 0.6 0 0 0 1
SECTION
#Xle Yle Zle Chord Angle
2.0 1.85 0.0 0.675 0.0
NACA
0012
CONTROL
#Name Gain XHinge Vector SgnDup
elevator 1.0 0.6 0 0 0 1

SURFACE
vertical
#NChordwise ChordSpacing NSpanwise SpanSpacing
12 1 20 1
YDUPLICATE
0.0
SECTION
#Xle Yle Zle Chord Angle
2 0 0.5 0.5 0.0
NACA
0012
SECTION
#Xle Yle Zle Chord Angle
2.0 0.0 0.8200000000000001 0.5 0.0
NACA
0012
CONTROL
#Name Gain XHinge Vector SgnDup
rudder 1.0 0.6 0 0 0 1
SECTION
#Xle Yle Zle Chord Angle
2.0 0.0 1.3 0.5 0.0
NACA
0012
CONTROL
#Name Gain XHinge Vector SgnDup
rudder 1.0 0.6 0 0 0 1
